# OpenSim document version 40000
AnalyzeTool ik_SOL_10:
  model_file: E:\Parameter Optimization Project\US Decompressed\MATLAB Code\Control Patients\SC7\S7.osim
  replace_force_set: false
  results_directory: E:\Parameter Optimization Project\US Decompressed\MATLAB Code\Control Patients\SC7\Results_SimpeAnkle_SOL\MuscleAnalysis
  output_precision: 8
  initial_time: 2.43347
  final_time: 10.0917
  solve_for_equilibrium_for_auxiliary_states: false
  maximum_number_of_integrator_steps: 20000
  maximum_integrator_step_size: 1
  minimum_integrator_step_size: 1e-8
  integrator_error_tolerance: 1e-5
  coordinates_file: .\Output Data\ik_SOL_10.mot
  lowpass_cutoff_frequency_for_coordinates: -1
  AnalysisSet Analyses:
    MuscleAnalysis: start_time=2.43347 end_time=10.0917 step_interval=1 in_degrees=true muscle_list=all
        moment_arm_coordinate_list=ankle_angle_r compute_moments=true
